** Aetheris AETHERIS-FEA-M5 verification deck
** Conventional C3D8 full-cell approximation; native Cut cells are omitted, never exported as full bricks.
*HEADING
PlateHoleFineAnalysis
*NODE
1, 0, 0, 0
2, 0.008333333333333333, 0, 0
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*ELEMENT, TYPE=C3D8, ELSET=SOLID
1, 1, 2, 27, 26, 321, 322, 347, 346
2, 2, 3, 28, 27, 322, 323, 348, 347
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*ELSET, ELSET=SOLID
1, 2, 3, 4, 5, 6
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*NSET, NSET=CLAMP
1, 26, 51, 76, 101, 126
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*NSET, NSET=TENSION
25, 50, 75, 100, 125, 149
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*MATERIAL, NAME=STEEL
*ELASTIC
200000000000, 0.3
*SOLID SECTION, ELSET=SOLID, MATERIAL=STEEL
,
*BOUNDARY
CLAMP, 1, 1, 0
CLAMP, 2, 2, 0
CLAMP, 3, 3, 0
*STEP, NAME=LINEAR_STATIC, NLGEOM=NO
*STATIC
1., 1., 1e-05, 1.
*CLOAD
TENSION, 1, 256.4102564102564
*OUTPUT, FIELD
*NODE OUTPUT
U, RF
*ELEMENT OUTPUT, DIRECTIONS=YES
S, E
*OUTPUT, HISTORY
*ENERGY OUTPUT
ALLSE
*END STEP
